f(x, y) := (x^2*y^2 - (2*x + 1)*y + x)/x
a := 1
b := 1.5
n := (b - a)/0.1
g := [
    1, 0, 0, 0;
    1.1, 0.087, 0.08550060, 0.08691841;
    1.2, 0.154, 0.15182421, 0.15378773;
    1.3, 0.207, 0.20507535, 0.20717467;
    1.4, 0.251, 0.24930409, 0.25135243;
    1.5, 0.289, 0.28728810, 0.28920828
]
y := rkfixed(0, a, b, n, f)
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y = [1, 0; 1.1, 0.0869184; 1.2, 0.153788; 1.3, 0.207175; 1.4, 0.251352; 1.5, 0.289208]
inac(maple, app) := 100*|maple - app|/maple
# AdvancedEulerMethod | RungeKuttaMethod
inac(y[1, 1], 0.08550060) = 1.6312
inac(y[1, 1], 0.08691841) = 2.72452e-6
inac(y[2, 1], 0.15182421) = 1.27677
inac(y[2, 1], 0.15378773) = 1.93591e-6
inac(y[3, 1], 0.20507535) = 1.01331
inac(y[3, 1], 0.20717467) = 1.00761e-6
inac(y[4, 1], 0.25135243) = 1.6352e-6
inac(y[4, 1], 0.24930409) = 0.814926
inac(y[5, 1], 0.28728810) = 0.663944
inac(y[5, 1], 0.28920828) = 3.17742e-7
