D(x, u) := [u[1] - cos(x); u[0] + cos(x)]
nz := [0; 0]
a := 0
b := 0.5
n := (b - a)/0.1
y := rkfixed(nz, a, b, n, D)
y = [
    0, 0, 0;
    0.1, -0.095, 0.095;
    0.2, -0.180002, 0.180002;
    0.3, -0.255019, 0.255019;
    0.4, -0.320079, 0.320079;
    0.5, -0.375238, 0.375238
]
inac(maple, app) := 100*|maple - app|/|maple|
# AdvancedMethod | RungeKuttaMethod
inac(y[5, 1], -0.3956) = 5.42633
inac(y[5, 1], -0.3928) = 4.68014
inac(y[5, 2], 0.3956) = 5.42633
inac(y[5, 2], 0.3928) = 4.68014
